AdvAeroCats_2020
0.0			| Mach
0 0 0.0		| iYsym  iZsym  Zsym
3168.0 24.0000072 132.0		| Sref   Cref   Bref
25.637519685 0.0 12.0		| Xref   Yref   Zref
0.0			| CDp  (optional)
#==============================================================
#
SURFACE
Horizontal Tail
10  1.0  20  -2.0  |  Nchord   Cspace   Nspan  Sspace

YDUPLICATE
0.0

ANGLE
-3.43935972311

INDEX
2
#-----------------------
SECTION
72.2803768279 0.0 15.465   11.4285714286  0 0 0 | Xle Yle Zle   Chord   Ainc   [ Nspan Sspace ]
AFIL
"E:\Users\Seth\PycharmProjects\UC_AircraftDesign\Aerothon-2020\Airfoils\NACA0012\NACA0012.dat"
CONTROL
Elevator  1.0  0.5  0. 0. 0.  1.0 | Name  gain  Xhinge  XYZhvec  SgnDup
#-----------------------
SECTION
72.2803768279 21.0 15.465   11.4285714286  0 0 0 | Xle Yle Zle   Chord   Ainc   [ Nspan Sspace ]
AFIL
"E:\Users\Seth\PycharmProjects\UC_AircraftDesign\Aerothon-2020\Airfoils\NACA0012\NACA0012.dat"
CONTROL
Elevator  1.0  0.5  0. 0. 0.  1.0 | Name  gain  Xhinge  XYZhvec  SgnDup
#==============================================================
#
SURFACE
ACMainWing
10  1.0  20  -2.0  |  Nchord   Cspace   Nspan  Sspace

YDUPLICATE
0.0

ANGLE
0.0

INDEX
1
#-----------------------
SECTION
17.7166300403 0.0 12.0   24.0000360001  0 0 0 | Xle Yle Zle   Chord   Ainc   [ Nspan Sspace ]
AFIL
"E:\Users\Seth\PycharmProjects\UC_AircraftDesign\Aerothon-2020\Airfoils\S1223_TC\S1223_TC.dat"
#-----------------------
SECTION
17.7166300403 43.56 12.0   24.0000360001  0 0 0 | Xle Yle Zle   Chord   Ainc   [ Nspan Sspace ]
AFIL
"E:\Users\Seth\PycharmProjects\UC_AircraftDesign\Aerothon-2020\Airfoils\S1223_TC\S1223_TC.dat"
CONTROL
Aileron  1.0  0.75  0. 0. 0.  -1.0 | Name  gain  Xhinge  XYZhvec  SgnDup
#-----------------------
SECTION
17.7166300403 65.99934 12.0   24.0000360001  0 0 0 | Xle Yle Zle   Chord   Ainc   [ Nspan Sspace ]
AFIL
"E:\Users\Seth\PycharmProjects\UC_AircraftDesign\Aerothon-2020\Airfoils\S1223_TC\S1223_TC.dat"
CONTROL
Aileron  1.0  0.75  0. 0. 0.  -1.0 | Name  gain  Xhinge  XYZhvec  SgnDup
#-----------------------
SECTION
19.5166327403 66.0 12.0   16.8000252  0 0 0 | Xle Yle Zle   Chord   Ainc   [ Nspan Sspace ]
AFIL
"E:\Users\Seth\PycharmProjects\UC_AircraftDesign\Aerothon-2020\Airfoils\S1223_TC\S1223_TC.dat"
CONTROL
Aileron  1.0  0.75  0. 0. 0.  -1.0 | Name  gain  Xhinge  XYZhvec  SgnDup
#==============================================================
#
SURFACE
Vertical Tail
10  1.0  20  -2.0  |  Nchord   Cspace   Nspan  Sspace

ANGLE
0.0

INDEX
3
#-----------------------
SECTION
72.137519685 0.0 15.465   12.0  0 0 0 | Xle Yle Zle   Chord   Ainc   [ Nspan Sspace ]
AFIL
"E:\Users\Seth\PycharmProjects\UC_AircraftDesign\Aerothon-2020\Airfoils\NACA0012\NACA0012.dat"
CONTROL
Rudder  1.0  0.5  0. 0. 0.  -1.0 | Name  gain  Xhinge  XYZhvec  SgnDup
#-----------------------
SECTION
75.137519685 0.0 35.465   9.0  0 0 0 | Xle Yle Zle   Chord   Ainc   [ Nspan Sspace ]
AFIL
"E:\Users\Seth\PycharmProjects\UC_AircraftDesign\Aerothon-2020\Airfoils\NACA0012\NACA0012.dat"
CONTROL
Rudder  1.0  0.5  0. 0. 0.  -1.0 | Name  gain  Xhinge  XYZhvec  SgnDup
